<?xml version="1.0"?>
<?xml-stylesheet type="text/xsl" href="http://jsbsim.sourceforge.net/JSBSim.xsl"?>
<fdm_config name="C-101_Aviojet" version="2.0" release="ALPHA"
	xmlns:xsi="http://www.w3.org/2001/XMLSchema-instance"
	xsi:noNamespaceSchemaLocation="http://jsbsim.sourceforge.net/JSBSim.xsd">

<!--
    CASA C-101_Aviojet for FlightGear flight simulator
    Copyright (C) 2013  Pavel Cueto, Fernando Espinosa

This program is free software; you can redistribute it and/or modify
it under the terms of the GNU General Public License as published by
the Free Software Foundation; either version 3 of the License, or
(at your option) any later version.

This program is distributed in the hope that it will be useful,
but WITHOUT ANY WARRANTY; without even the implied warranty of
MERCHANTABILITY or FITNESS FOR A PARTICULAR PURPOSE. See the
GNU General Public License for more details.

You should have received a copy of the GNU General Public License
along with this program; if not, write to the Free Software
Foundation, Inc., 51 Franklin St, Fifth Floor, Boston, MA 02110-1301 USA.
-->
<!--
Inputs:
	name:			C-101_Aviojet
	type:			single-engine transonic/supersonic fighter
	max weight:		12348 lb
	wing span:		34.7786 ft
	length:			40.19225 ft
	wing area:		215.3 sq-ft
	gear type:		tricycle
	retractable?:	yes
	# engines:		1
	engine type:	turbine
	engine layout:	middle fuselage
	yaw damper?		yes

Outputs:
	wing loading:	57.35 lb/sq-ft
	CL-alpha:		3.5 per radian
	CL-0:			0.08
	CL-max:			1
	CD-0:			0.021
	K:				0.12
-->

	<!-- Medidas y pesos -->

<metrics>
	<wingarea  unit="FT2">  215.30 </wingarea>
	<wingspan  unit="FT" >   34.78 </wingspan>
	<wing_incidence>          2.00 </wing_incidence>
	<chord     unit="FT" >    6.19 </chord>
	<htailarea unit="FT2">   43.06 </htailarea>
	<htailarm  unit="FT" >   16.08 </htailarm>
	<vtailarea unit="FT2">   25.84 </vtailarea>
	<vtailarm  unit="FT" >   16.08 </vtailarm>
	<location name="AERORP" unit="M">   <!-- <location name="AERORP" unit="IN"> -->
		<x>-0.50 </x>
		<y> 0.00 </y>
		<z>-0.30 </z>
	</location>
	<location name="EYEPOINT" unit="M">
		<x>-3.465</x>
		<y> 0</y>
		<z> 0.30</z>
	</location>
	<location name="VRP" unit="M">
		<x>0</x>
		<y>0</y>
		<z>0</z>
	</location>
 </metrics>

<mass_balance>
	<ixx unit="SLUG*FT2">      5072 </ixx>
	<iyy unit="SLUG*FT2">     11383 </iyy>
	<izz unit="SLUG*FT2">     12932 </izz>
	<emptywt unit="LBS" >      7409 </emptywt>

	<location name="CG" unit="M">
		<x>-0.500</x>
		<y> 0.000</y>
		<z>-0.100</z>
	</location>

	<pointmass name="Pilot">
		<weight unit="LBS"> 180.0 </weight>
		<location name="POINTMASS" unit="M">
			<x>-3.465</x>
			<y> 0</y>
			<z>-0.126</z>
		</location>
	</pointmass>

	<pointmass name="Copilot">
		<weight unit="LBS"> 180.0 </weight>
		<location name="POINTMASS" unit="M">
		<x>-1.801</x>
		<y> 0</y>
		<z> 0.074</z>
		</location>
	</pointmass>
</mass_balance>

	<!-- Motor y propulsion -->

<propulsion>
	<engine file="Garrett_TFE731-2">
		<location unit="M">
			<x> 3.775</x>
			<y> 0.000</y>
			<z>-0.237</z>
		</location>
		<orient unit="DEG">
			<pitch> 0 </pitch>
			<roll>  0 </roll>
			<yaw>   0 </yaw>
		</orient>
		<feed>0</feed>
		<thruster file="direct">
			<location unit="M">
				<x> 4.05 </x>
				<y> 0    </y>
				<z>-0.237</z>
			</location>
			<orient unit="DEG">
				<pitch> 0 </pitch>
				<roll>  0 </roll>
				<yaw>   0 </yaw>
			</orient>
		</thruster>
	</engine>

<!-- Tanques de combustible -->

	<tank type="FUEL" number="0">   <!-- En el fuselaje -->
		<location unit="M">
			<x>-0.250</x>
			<y> 0    </y>
			<z> 0.200</z>
		</location>
		<capacity unit="LBS"> 1984.00 </capacity>
		<contents unit="LBS"> 1984.00 </contents>
		<type>JET-A</type>
	</tank>

	<tank type="FUEL" number="1">   <!-- En el centro de las alas -->
		<location unit="M">
			<x>-0.250</x>
			<y> 0    </y>
			<z>-0.450</z>
		</location>
		<capacity unit="LBS">  988.00 </capacity>
		<contents unit="LBS">  496.00 </contents>
		<type>JET-A</type>
	</tank>

	<tank type="FUEL" number="2">   <!-- En el ala izqd -->
		<location unit="M">
			<x>-0.250</x>
			<y>-3.053</y>
			<z>-0.265</z>
		</location>
		<capacity unit="LBS">  588.00 </capacity>
		<contents unit="LBS">  0      </contents>
		<type>JET-A</type>
	</tank>

	<tank type="FUEL" number="3">   <!-- En el ala decha -->
		<location unit="M">
			<x>-0.250</x>
			<y> 3.053</y>
			<z>-0.265</z>
		</location>
		<capacity unit="LBS">  588.00 </capacity>
		<contents unit="LBS">  0      </contents>
		<type>JET-A</type>
	</tank>
</propulsion>

	<!-- Tren de aterrizaje -->

<ground_reactions>
	<contact type="BOGEY" name="NOSE">
		<location unit="M">
			<x>-4.817</x>
			<y> 0.000</y>
			<z>-1.842</z>
		</location>
		<static_friction>  0.80 </static_friction>
		<dynamic_friction> 0.50 </dynamic_friction>
		<rolling_friction> 0.02 </rolling_friction>
		<spring_coeff unit="LBS/FT">       3704.40 </spring_coeff>
		<damping_coeff unit="LBS/FT/SEC">  1234.80 </damping_coeff>
		<max_steer unit="DEG"> 40.00 </max_steer>
		<brake_group>NONE</brake_group>
		<retractable>1</retractable>
	</contact>

	<contact type="BOGEY" name="LEFT_MAIN">
		<location unit="M">
			<x>-0.110</x>
			<y>-1.389</y>
			<z>-1.936</z>
		</location>
		<static_friction>  0.80 </static_friction>
		<dynamic_friction> 0.50 </dynamic_friction>
		<rolling_friction> 0.02 </rolling_friction>
		<spring_coeff unit="LBS/FT">      12348.00 </spring_coeff>
		<damping_coeff unit="LBS/FT/SEC">  2469.60 </damping_coeff>
		<max_steer unit="DEG">0</max_steer>
		<brake_group>LEFT</brake_group>
		<retractable>1</retractable>
	</contact>

	<contact type="BOGEY" name="RIGHT_MAIN">
		<location unit="M">
			<x>-0.110</x>
			<y> 1.389</y>
			<z>-1.936</z>
		</location>
		<static_friction>  0.80 </static_friction>
		<dynamic_friction> 0.50 </dynamic_friction>
		<rolling_friction> 0.02 </rolling_friction>
		<spring_coeff unit="LBS/FT">      12348.00 </spring_coeff>
		<damping_coeff unit="LBS/FT/SEC">  2469.60 </damping_coeff>
		<max_steer unit="DEG">0</max_steer>
		<brake_group>RIGHT</brake_group>
		<retractable>1</retractable>
	</contact>

<!-- Alas -->

	<contact type="STRUCTURE" name="LEFT_WING_FRONT_INNER">
		<location unit="M">
			<x>-0.940</x>
			<y>-3.092</y>
			<z>-0.253</z>
		</location>
		<static_friction>  0.80 </static_friction>
		<dynamic_friction> 0.50 </dynamic_friction>
		<spring_coeff unit="LBS/FT">      12348.00 </spring_coeff>
		<damping_coeff unit="LBS/FT/SEC">  2469.60 </damping_coeff>
	</contact>

	<contact type="STRUCTURE" name="LEFT_WING_FRONT_OUTER">
		<location unit="M">
			<x>-0.811</x>
			<y>-4.860</y>
			<z>-0.099</z>
		</location>
		<static_friction>  0.80 </static_friction>
		<dynamic_friction> 0.50 </dynamic_friction>
		<spring_coeff unit="LBS/FT">      12348.00 </spring_coeff>
		<damping_coeff unit="LBS/FT/SEC">  2469.60 </damping_coeff>
	</contact>

	<contact type="STRUCTURE" name="LEFT_WING_REAR">
		<location unit="M">
			<x>-0.868</x>
			<y>-3.092</y>
			<z>-0.248</z>
		</location>
		<static_friction>  0.80 </static_friction>
		<dynamic_friction> 0.50 </dynamic_friction>
		<spring_coeff unit="LBS/FT">      12348.00 </spring_coeff>
		<damping_coeff unit="LBS/FT/SEC">  2469.60 </damping_coeff>
	</contact>

	<contact type="STRUCTURE" name="LEFT_WING_OUTER_FRONT">
		<location unit="M">
			<x>-0.381</x>
			<y>-5.202</y>
			<z>-0.069</z>
		</location>
		<static_friction>  0.80 </static_friction>
		<dynamic_friction> 0.50 </dynamic_friction>
		<spring_coeff unit="LBS/FT">      12348.00 </spring_coeff>
		<damping_coeff unit="LBS/FT/SEC">  2469.60 </damping_coeff>
	</contact>

	<contact type="STRUCTURE" name="LEFT_WING_OUTER_REAR">
		<location unit="M">
			<x> 0.634</x>
			<y>-5.202</y>
			<z>-0.069</z>
		</location>
		<static_friction>  0.80 </static_friction>
		<dynamic_friction> 0.50 </dynamic_friction>
		<spring_coeff unit="LBS/FT">      12348.00 </spring_coeff>
		<damping_coeff unit="LBS/FT/SEC">  2469.60 </damping_coeff>
	</contact>

	<contact type="STRUCTURE" name="RIGHT_WING_FRONT_INNER">
		<location unit="M">
			<x>-0.940</x>
			<y> 3.092</y>
			<z>-0.253</z>
		</location>
		<static_friction>  0.80 </static_friction>
		<dynamic_friction> 0.50 </dynamic_friction>
		<spring_coeff unit="LBS/FT">      12348.00 </spring_coeff>
		<damping_coeff unit="LBS/FT/SEC">  2469.60 </damping_coeff>
	</contact>

	<contact type="STRUCTURE" name="RIGHT_WING_FRONT_OUTER">
		<location unit="M">
			<x>-0.811</x>
			<y> 4.860</y>
			<z>-0.099</z>
		</location>
		<static_friction>  0.80 </static_friction>
		<dynamic_friction> 0.50 </dynamic_friction>
		<spring_coeff unit="LBS/FT">      12348.00 </spring_coeff>
		<damping_coeff unit="LBS/FT/SEC">  2469.60 </damping_coeff>
	</contact>

	<contact type="STRUCTURE" name="RIGHT_WING_REAR">
		<location unit="M">
			<x>-0.868</x>
			<y> 3.092</y>
			<z>-0.248</z>
		</location>
		<static_friction>  0.80 </static_friction>
		<dynamic_friction> 0.50 </dynamic_friction>
		<spring_coeff unit="LBS/FT">      12348.00 </spring_coeff>
		<damping_coeff unit="LBS/FT/SEC">  2469.60 </damping_coeff>
	</contact>

	<contact type="STRUCTURE" name="RIGHT_WING_OUTER_FRONT">
		<location unit="M">
			<x>-0.381</x>
			<y> 5.202</y>
			<z>-0.069</z>
		</location>
		<static_friction>  0.80 </static_friction>
		<dynamic_friction> 0.50 </dynamic_friction>
		<spring_coeff unit="LBS/FT">      12348.00 </spring_coeff>
		<damping_coeff unit="LBS/FT/SEC">  2469.60 </damping_coeff>
	</contact>

	<contact type="STRUCTURE" name="RIGHT_WING_OUTER_REAR">
		<location unit="M">
			<x> 0.634</x>
			<y> 5.202</y>
			<z>-0.069</z>
		</location>
		<static_friction>  0.80 </static_friction>
		<dynamic_friction> 0.50 </dynamic_friction>
		<spring_coeff unit="LBS/FT">      12348.00 </spring_coeff>
		<damping_coeff unit="LBS/FT/SEC">  2469.60 </damping_coeff>
	</contact>

	<contact type="STRUCTURE" name="NOSE">
		<location unit="M">
			<x>-6.714</x>
			<y> 0.000</y>
			<z>-0.618</z>
		</location>
		<static_friction>  0.80 </static_friction>
		<dynamic_friction> 0.50 </dynamic_friction>
		<spring_coeff unit="LBS/FT">      12348.00 </spring_coeff>
		<damping_coeff unit="LBS/FT/SEC">  2469.60 </damping_coeff>
	</contact>

	<contact type="STRUCTURE" name="ENGINE_NOZZLE">
		<location unit="M">
			<x> 3.992</x>
			<y> 0.000</y>
			<z>-0.531</z>
		</location>
		<static_friction>  0.80 </static_friction>
		<dynamic_friction> 0.50 </dynamic_friction>
		<spring_coeff unit="LBS/FT">      12348.00 </spring_coeff>
		<damping_coeff unit="LBS/FT/SEC">  2469.60 </damping_coeff>
	</contact>

	<contact type="STRUCTURE" name="TAIL">
		<location unit="M">
			<x> 5.737</x>
			<y> 0.000</y>
			<z> 0.32</z>
		</location>
		<static_friction>  0.80 </static_friction>
		<dynamic_friction> 0.50 </dynamic_friction>
		<spring_coeff unit="LBS/FT">      12348.00 </spring_coeff>
		<damping_coeff unit="LBS/FT/SEC">  2469.60 </damping_coeff>
	</contact>

	<contact type="STRUCTURE" name="AIRPLANE_BELLY_FRONT">
		<location unit="M">
			<x>-4.649</x>
			<y> 0.000</y>
			<z>-0.787</z>
		</location>
		<static_friction>  0.80 </static_friction>
		<dynamic_friction> 0.50 </dynamic_friction>
		<spring_coeff unit="LBS/FT">      12348.00 </spring_coeff>
		<damping_coeff unit="LBS/FT/SEC">  2469.60 </damping_coeff>
	</contact>

	<contact type="STRUCTURE" name="AIRPLANE_BELLY_MIDDLE">
		<location unit="M">
			<x> 1.102</x>
			<y> 0.000</y>
			<z>-0.788</z>
		</location>
		<static_friction>  0.80 </static_friction>
		<dynamic_friction> 0.50 </dynamic_friction>
		<spring_coeff unit="LBS/FT">      12348.00 </spring_coeff>
		<damping_coeff unit="LBS/FT/SEC">  2469.60 </damping_coeff>
	</contact>

	<contact type="STRUCTURE" name="VERTICAL_TAIL_FRONT">
		<location unit="M">
			<x> 5.062</x>
			<y> 0.000</y>
			<z> 2.412</z>
		</location>
		<static_friction>  0.80 </static_friction>
		<dynamic_friction> 0.50 </dynamic_friction>
		<spring_coeff unit="LBS/FT">      12348.00 </spring_coeff>
		<damping_coeff unit="LBS/FT/SEC">  2469.60 </damping_coeff>
	</contact>

	<contact type="STRUCTURE" name="VERTICAL_TAIL_REAR">
		<location unit="M">
			<x> 5.731</x>
			<y> 0.000</y>
			<z> 2.416</z>
		</location>
		<static_friction>  0.80 </static_friction>
		<dynamic_friction> 0.50 </dynamic_friction>
		<spring_coeff unit="LBS/FT">      12348.00 </spring_coeff>
		<damping_coeff unit="LBS/FT/SEC">  2469.60 </damping_coeff>
	</contact>

	<contact type="STRUCTURE" name="COCKPIT_FRONT">
		<location unit="M">
			<x>-3.907</x>
			<y> 0.000</y>
			<z> 0.543</z>
		</location>
		<static_friction>  0.80 </static_friction>
		<dynamic_friction> 0.50 </dynamic_friction>
		<spring_coeff unit="LBS/FT">      12348.00 </spring_coeff>
		<damping_coeff unit="LBS/FT/SEC">  2469.60 </damping_coeff>
	</contact>

	<contact type="STRUCTURE" name="COCKPIT_MIDDLE">
		<location unit="M">
			<x>-2.247</x>
			<y> 0.000</y>
			<z> 0.934</z>
		</location>
		<static_friction>  0.80 </static_friction>
		<dynamic_friction> 0.50 </dynamic_friction>
		<spring_coeff unit="LBS/FT">      12348.00 </spring_coeff>
		<damping_coeff unit="LBS/FT/SEC">  2469.60 </damping_coeff>
	</contact>

	<contact type="STRUCTURE" name="FUSELAGE_TOP_FRONT">
		<location unit="M">
			<x>-1.099</x>
			<y> 0.000</y>
			<z> 0.934</z>
		</location>
		<static_friction>  0.80 </static_friction>
		<dynamic_friction> 0.50 </dynamic_friction>
		<spring_coeff unit="LBS/FT">      12348.00 </spring_coeff>
		<damping_coeff unit="LBS/FT/SEC">  2469.60 </damping_coeff>
	</contact>

	<contact type="STRUCTURE" name="FUSELAGE_TOP_REAR">
		<location unit="M">
			<x> 3.083</x>
			<y> 0.000</y>
			<z> 0.812</z>
		</location>
		<static_friction>  0.80 </static_friction>
		<dynamic_friction> 0.50 </dynamic_friction>
		<spring_coeff unit="LBS/FT">      12348.00 </spring_coeff>
		<damping_coeff unit="LBS/FT/SEC">  2469.60 </damping_coeff>
	</contact>

	<contact type="STRUCTURE" name="LEFT_HTAIL_FRONT">
		<location unit="M">
			<x> 4.033</x>
			<y>-2.078</y>
			<z> 0.688</z>
		</location>
		<static_friction>  0.80 </static_friction>
		<dynamic_friction> 0.50 </dynamic_friction>
		<spring_coeff unit="LBS/FT">      12348.00 </spring_coeff>
		<damping_coeff unit="LBS/FT/SEC">  2469.60 </damping_coeff>
	</contact>

	<contact type="STRUCTURE" name="LEFT_HTAIL_REAR">
		<location unit="M">
			<x> 4.649</x>
			<y>-2.078</y>
			<z> 0.688</z>
		</location>
		<static_friction>  0.80 </static_friction>
		<dynamic_friction> 0.50 </dynamic_friction>
		<spring_coeff unit="LBS/FT">      12348.00 </spring_coeff>
		<damping_coeff unit="LBS/FT/SEC">  2469.60 </damping_coeff>
	</contact>

</ground_reactions>

	<!-- *Controles* -->

<flight_control name="FCS: C-101_Aviojet">

<!-- Controles elevacion -->

<channel name="Pitch">
	<pure_gain name="Pitch Damper Gain">
		<input>velocities/q-rad_sec</input>
		<gain>0.3</gain>
	</pure_gain>
	<summer name="Pitch Trim Sum">
		<input>fcs/elevator-cmd-norm</input>
		<input>fcs/pitch-trim-cmd-norm</input>
		<clip>
			<min>-1</min>
			<max>1</max>
		</clip>
	</summer>
	<aerosurface_scale name="Elevator Control">
		<input>fcs/pitch-trim-sum</input>
		<gain>0.01745</gain>
		<range>
			<min>-20</min>
			<max>17</max>
		</range>
		<output>fcs/elevator-pos-rad</output>
	</aerosurface_scale>
	<aerosurface_scale name="Elevator Position Normalized">
		<input>fcs/elevator-pos-deg</input>
		<domain>
			<min>-20</min>
			<max>17</max>
		</domain>
		<range>
			<min>-1</min>
			<max>1</max>
		</range>
		<output>fcs/elevator-pos-norm</output>
	</aerosurface_scale>
</channel>

<!-- Controles de los alerones -->

<channel name="Roll">
	<summer name="Roll Trim Sum">
		<input>fcs/aileron-cmd-norm</input>
		<input>fcs/roll-trim-cmd-norm</input>
		<clipto>
			<min> -1 </min>
			<max>  1 </max>
		</clipto>
	</summer>
	<aerosurface_scale name="Left Aileron Control">
		<input>fcs/roll-trim-sum</input>
		<range>
			<min> -0.35 </min>
			<max>  0.35 </max>
		</range>
		<output>fcs/left-aileron-pos-rad</output>
	</aerosurface_scale>
	<aerosurface_scale name="Right Aileron Control">
		<input>fcs/roll-trim-sum</input>
		<range>
			<min> -0.35 </min>
			<max>  0.35 </max>
		</range>
		<output>fcs/right-aileron-pos-rad</output>
	</aerosurface_scale>
	<aerosurface_scale name="left aileron normalization">
		<input>fcs/left-aileron-pos-rad</input>
		<domain>
			<min> -0.35 </min>
			<max>  0.35 </max>
		</domain>
		<range>
			<min> -1 </min>
			<max>  1 </max>
		</range>
		<output>fcs/left-aileron-pos-norm</output>
	</aerosurface_scale>
	<aerosurface_scale name="right aileron normalization">
		<input>fcs/right-aileron-pos-rad</input>
		<domain>
			<min> -0.35 </min>
			<max>  0.35 </max>
		</domain>
		<range>
			<min> -1 </min>
			<max>  1 </max>
		</range>
		<output>fcs/right-aileron-pos-norm</output>
	</aerosurface_scale>
</channel>

<!-- Controles del Timon -->

<channel name="Yaw">
	<summer name="Rudder Command Sum">
		<input>fcs/rudder-cmd-norm</input>
		<input>fcs/yaw-trim-cmd-norm</input>
		<clipto>
			<min> -0.35 </min>
			<max>  0.35 </max>
		</clipto>
	</summer>
	<scheduled_gain name="Yaw Damper Rate">
		<input>velocities/r-aero-rad_sec</input>
		<table>
			<independentVar lookup="row">velocities/ve-kts</independentVar>
			<tableData>
			30     0.00
			60     2.00
			</tableData>
		</table>
	</scheduled_gain>
	<scheduled_gain name="Yaw Damper Beta">
		<input>aero/beta-rad</input>
		<table>
			<independentVar lookup="row">velocities/ve-kts</independentVar>
			<tableData>
			30     0.00
			60     0.00
			</tableData>
		</table>
	</scheduled_gain>

   <summer name="Yaw Damper Sum">
      <input>fcs/yaw-damper-beta</input>
      <input>fcs/yaw-damper-rate</input>
      <clipto>
        <min> -0.1 </min>
        <max>  0.1 </max>
      </clipto>
   </summer>
   <scheduled_gain name="Yaw Damper Final">
      <input>fcs/yaw-damper-sum</input>
      <table>
        <independentVar lookup="row">velocities/ve-kts</independentVar>
        <tableData>
           30         0.0
           31         1.0
        </tableData>
      </table>
   </scheduled_gain>

   <summer name="Rudder Sum">
      <input>fcs/rudder-command-sum</input>
      <input>fcs/yaw-damper-final</input>
      <clipto>
        <min> -1 </min>
        <max>  1 </max>
      </clipto>
   </summer>
   <aerosurface_scale name="Rudder Control">
      <input>fcs/rudder-sum</input>
      <range>
        <min> -0.35 </min>
        <max>  0.35 </max>
      </range>
      <output>fcs/rudder-pos-rad</output>
   </aerosurface_scale>

   <aerosurface_scale name="rudder normalization">
      <input>fcs/rudder-pos-rad</input>
      <domain>
        <min> -0.35 </min>
        <max>  0.35 </max>
      </domain>
      <range>
        <min> -1 </min>
        <max>  1 </max>
      </range>
      <output>fcs/rudder-pos-norm</output>
   </aerosurface_scale>
</channel>

<!-- Controles de los Flaps -->

<channel name="Flaps">
	<kinematic name="Flaps Control">
		<input>fcs/flap-cmd-norm</input>
		<traverse>
			<setting>
				<position>  0 </position>
				<time>      0 </time>
			</setting>
			<setting>
				<position> 10 </position>
				<time>      3 </time>
			</setting>
			<setting>
				<position> 30 </position>
				<time>      3 </time>
			</setting>
		</traverse>
		<output>fcs/flap-pos-deg</output>
	</kinematic>
	<aerosurface_scale name="flap normalization">
		<input>fcs/flap-pos-deg</input>
		<domain>
			<min>  0 </min>
			<max> 30 </max>
		</domain>
		<range>
			<min> 0 </min>
			<max> 1 </max>
		</range>
		<output>fcs/flap-pos-norm</output>
	</aerosurface_scale>
</channel>

<!-- Controles tren de aterrizaje -->

<channel name="Landing Gear">
	<kinematic name="Gear Control">
		<input>gear/gear-cmd-norm</input>
		<traverse>
			<setting>
				<position> 0 </position>
				<time>     0 </time>
			</setting>
			<setting>
				<position> 1 </position>
				<time>     5 </time>
			</setting>
		</traverse>
	<output>gear/gear-pos-norm</output>
	</kinematic>
</channel>

<!-- Aerofrenos  -->

<channel name="Speedbrake">
	<kinematic name="Speedbrake Control">
		<input>fcs/speedbrake-cmd-norm</input>
		<traverse>
			<setting>
				<position> 0 </position>
				<time>     0 </time>
			</setting>
			<setting>
				<position> 1 </position>
				<time>     1.5 </time>
			</setting>
		</traverse>
		<output>fcs/speedbrake-pos-norm</output>
	</kinematic>
</channel>

</flight_control>

<!-- *Aerodinamica* -->
<aerodynamics>

<!-- Sustentacion -->
<axis name="LIFT">

    <function name="aero/force/Lift_alpha">
		<description>Lift due to alpha</description>
		<product>
			<property>aero/qbar-psf</property>
			<property>metrics/Sw-sqft</property>
			<table>
				<independentVar lookup="row">aero/alpha-rad</independentVar>
				<tableData>
				-0.20	-0.620
				0.00	0.080
				0.26	1.000
				0.60	0.448
				</tableData>
			</table>
		</product>
	</function>

	<function name="aero/force/Lift_flap">
		<description>Delta Lift due to flaps</description>
		<product>
			<property>aero/qbar-psf</property>
			<property>metrics/Sw-sqft</property>
			<property>fcs/flap-pos-deg</property>
			<value> 0.01167 </value>
		</product>
	</function>

	<function name="aero/force/Lift_speedbrake">
		<description>Delta Lift due to speedbrake</description>
		<product>
			<property>aero/qbar-psf</property>
			<property>metrics/Sw-sqft</property>
			<property>fcs/speedbrake-pos-norm</property>
			<value>0</value>
		</product>
	</function>

	<function name="aero/force/Lift_elevator">
		<description>Lift due to Elevator Deflection</description>
		<product>
			<property>aero/qbar-psf</property>
			<property>metrics/Sw-sqft</property>
			<property>fcs/elevator-pos-rad</property>
			<value>0.2</value>
		</product>
	</function>

</axis>

<!-- Resistencia al avance -->
<axis name="DRAG">

	<function name="aero/force/Drag_basic">
		<description>Drag at zero lift</description>
		<product>
			<property>aero/qbar-psf</property>
			<property>metrics/Sw-sqft</property>
			<table>
				<independentVar lookup="row">aero/alpha-rad</independentVar>
				<tableData>
				-1.57   1.500
				-0.26   0.027
				0.00    0.021
				0.26    0.027
				1.57    1.500
				</tableData>
			</table>
		</product>
	</function>

	<function name="aero/force/Drag_induced">
		<description>Induced drag</description>
		<product>
			<property>aero/qbar-psf</property>
			<property>metrics/Sw-sqft</property>
			<property>aero/cl-squared</property>
			<value>0.12</value>
		</product>
	</function>

	<function name="aero/force/Drag_mach">
		<description>Drag due to mach</description>
		<product>
			<property>aero/qbar-psf</property>
			<property>metrics/Sw-sqft</property>
			<table>
				<independentVar lookup="row">velocities/mach</independentVar>
				<tableData>
				0.00	0.000
				0.81	0.000
				1.10	0.023
				1.80	0.015
				</tableData>
			</table>
		</product>
	</function>

	<function name="aero/force/Drag_flap">
		<description>Drag due to flaps</description>
		<product>
			<property>aero/qbar-psf</property>
			<property>metrics/Sw-sqft</property>
			<property>fcs/flap-pos-deg</property>
			<value> 0.00267 </value>
		</product>
	</function>

	<function name="aero/force/Drag_gear">
		<description>Drag due to gear</description>
		<product>
			<property>aero/qbar-psf</property>
			<property>metrics/Sw-sqft</property>
			<property>gear/gear-pos-norm</property>
			<value>0.02</value>
		</product>
	</function>

    <function name="aero/force/Drag_speedbrake">
       <description>Drag due to speedbrakes</description>
         <product>
           <property>aero/qbar-psf</property>
           <property>metrics/Sw-sqft</property>
           <property>fcs/speedbrake-pos-norm</property>
           <value>0.032</value>
         </product>
    </function>

	<function name="aero/force/Drag_beta">
		<description>Drag due to sideslip</description>
		<product>
			<property>aero/qbar-psf</property>
			<property>metrics/Sw-sqft</property>
			<table>
				<independentVar lookup="row">aero/beta-rad</independentVar>
				<tableData>
				-1.57	1.230
				-0.26	0.050
				0.00	0.000
				0.26	0.050
				1.57	1.230
				</tableData>
			</table>
		</product>
	</function>

	<function name="aero/force/Drag_elevator">
		<description>Drag due to Elevator Deflection</description>
		<product>
			<property>aero/qbar-psf</property>
			<property>metrics/Sw-sqft</property>
			<abs><property>fcs/elevator-pos-norm</property></abs>
			<value>0.02</value>
			<!-- <value>0.04</value> -->
		</product>
	</function>

</axis>

<!-- Lateral -->
<axis name="SIDE">

	<function name="aero/force/Side_beta">
		<description>Side force due to beta</description>
		<product>
			<property>aero/qbar-psf</property>
			<property>metrics/Sw-sqft</property>
			<property>aero/beta-rad</property>
			<value>-1</value>
		</product>
	</function>

</axis>

<!-- Momentos -->
<axis name="ROLL">

	<function name="aero/moment/Roll_beta">
		<description>Roll moment due to beta</description>
		<product>
			<property>aero/qbar-psf</property>
			<property>metrics/Sw-sqft</property>
			<property>metrics/bw-ft</property>
			<property>aero/beta-rad</property>
			<value>-0.1</value>
		</product>
    </function>

	<function name="aero/moment/Roll_damp">
		<description>Roll moment due to roll rate</description>
		<product>
			<property>aero/qbar-psf</property>
			<property>metrics/Sw-sqft</property>
			<property>metrics/bw-ft</property>
			<property>aero/bi2vel</property>
			<property>velocities/p-aero-rad_sec</property>
			<value>-0.4</value>
		</product>
	</function>

	<function name="aero/moment/Roll_yaw">
		<description>Roll moment due to yaw rate</description>
		<product>
			<property>aero/qbar-psf</property>
			<property>metrics/Sw-sqft</property>
			<property>metrics/bw-ft</property>
			<property>aero/bi2vel</property>
			<property>velocities/r-aero-rad_sec</property>
			<value>0.15</value>
		</product>
	</function>

	<function name="aero/moment/Roll_aileron">
		<description>Roll moment due to aileron</description>
		<product>
			<property>aero/qbar-psf</property>
			<property>metrics/Sw-sqft</property>
			<property>metrics/bw-ft</property>
			<property>fcs/left-aileron-pos-rad</property>
			<table>
				<independentVar lookup="row">velocities/mach</independentVar>
				<tableData>
				0.0		0.110
				2.0		0.037
				</tableData>
			</table>
		</product>
	</function>

	<function name="aero/moment/Roll_rudder">
		<description>Roll moment due to rudder</description>
		<product>
			<property>aero/qbar-psf</property>
			<property>metrics/Sw-sqft</property>
			<property>metrics/bw-ft</property>
			<property>fcs/rudder-pos-rad</property>
			<value>0.01</value>
		</product>
	</function>

</axis>

<!-- Momentos -->
<axis name="PITCH">

	<function name="aero/moment/Pitch_alpha">
		<description>Pitch moment due to alpha</description>
		<product>
			<property>aero/qbar-psf</property>
			<property>metrics/Sw-sqft</property>
			<property>metrics/cbarw-ft</property>
			<property>aero/alpha-rad</property>
			<value>-0.3</value>
		</product>
	</function>

	<function name="aero/moment/Pitch_elevator">
		<description>Pitch moment due to elevator</description>
		<product>
			<property>aero/qbar-psf</property>
			<property>metrics/Sw-sqft</property>
			<property>metrics/cbarw-ft</property>
			<property>fcs/elevator-pos-rad</property>
			<table>
				<independentVar lookup="row">velocities/mach</independentVar>
				<tableData>
				0.0		-0.800
				2.0		-0.200
				</tableData>
			</table>
		</product>
	</function>

	<function name="aero/moment/Pitch_damp">
		<description>Pitch moment due to pitch rate</description>
		<product>
			<property>aero/qbar-psf</property>
			<property>metrics/Sw-sqft</property>
			<property>metrics/cbarw-ft</property>
			<property>aero/ci2vel</property>
			<property>velocities/q-aero-rad_sec</property>
			<value>-18</value>
		</product>
	</function>

	<function name="aero/moment/Pitch_alphadot">
		<description>Pitch moment due to alpha rate</description>
		<product>
			<property>aero/qbar-psf</property>
			<property>metrics/Sw-sqft</property>
			<property>metrics/cbarw-ft</property>
			<property>aero/ci2vel</property>
			<property>aero/alphadot-rad_sec</property>
			<value>-9</value>
		</product>
	</function>

</axis>

<!-- Momentos -->
<axis name="YAW">

	<function name="aero/moment/Yaw_beta">
		<description>Yaw moment due to beta</description>
		<product>
			<property>aero/qbar-psf</property>
			<property>metrics/Sw-sqft</property>
			<property>metrics/bw-ft</property>
			<property>aero/beta-rad</property>
			<value>0.12</value>
		</product>
	</function>

	<function name="aero/moment/Yaw_damp">
		<description>Yaw moment due to yaw rate</description>
		<product>
			<property>aero/qbar-psf</property>
			<property>metrics/Sw-sqft</property>
			<property>metrics/bw-ft</property>
			<property>aero/bi2vel</property>
			<property>velocities/r-aero-rad_sec</property>
			<value>-0.15</value>
		</product>
	</function>

	<function name="aero/moment/Yaw_rudder">
		<description>Yaw moment due to rudder</description>
		<product>
			<property>aero/qbar-psf</property>
			<property>metrics/Sw-sqft</property>
			<property>metrics/bw-ft</property>
			<property>fcs/rudder-pos-rad</property>
			<value>-0.1</value>
		</product>
	</function>

	<function name="aero/moment/Yaw_aileron">
		<description>Adverse yaw</description>
		<product>
			<property>aero/qbar-psf</property>
			<property>metrics/Sw-sqft</property>
			<property>metrics/bw-ft</property>
			<property>fcs/left-aileron-pos-rad</property>
			<value>0</value>
		</product>
	</function>

</axis>

</aerodynamics>

	<!-- PUSHBACK -->

<system file="Pushback"/>
<system file="Fuel"/>
<system file="Crash-detect"/>

<external_reactions>
	<force name="pushback" frame="BODY">
		<location unit="IN">
			<x>-4.7</x>
			<y> 0  </y>
			<z>-1.7</z>
		</location>
		<direction>
			<x>1</x>
			<y>0</y>
			<z>0</z>
		</direction>
	</force>
</external_reactions>

</fdm_config>
